*Heading
history replay beam 12x4x2 C3D8, 10 steps
*Node
1, 0.0, 0.0, 0.0
2, 1.0, 0.0, 0.0
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*Element, type=C3D8, elset=ALL
1, 1, 2, 15, 14, 66, 67, 80, 79
2, 2, 3, 16, 15, 67, 68, 81, 80
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*Nset, nset=ROOT
1, 14, 27, 40, 53, 66, 79, 92, 105, 118, 131, 144, 157, 170, 183
*Nset, nset=TIP
13, 26, 39, 52, 65, 78, 91, 104, 117, 130, 143, 156, 169, 182, 195
*Nset, nset=TIPMID
39
*Elset, elset=ROOTEL, generate
1, 85, 12
*Material, name=UMATMAT
*Depvar
1
*User Material, constants=4
200000.0, 0.3, 250.0, 2000.0
*Solid Section, elset=ALL, material=UMATMAT
,
*Boundary
ROOT, ENCASTRE
*Step, name=Push, nlgeom=NO, inc=20
*Static, direct
0.1, 1.0
*Controls, parameters=field, field=global
1e-9, 1e-8
*Boundary
TIP, 2, 2, -0.08
*Output, field, frequency=1
*Node Output
U, RF
*Element Output, position=INTEGRATION POINTS
S, SDV
*End Step
