*Heading
Nonuniform single C3D8, elastic verification UMAT (M3).
Distorted geometry + mixed top loads -> distinct strain at all 8 IPs.
Base face fixed, top face free -> nonzero du/da.
**
*Node
1,  0.00, 0.00, 0.00
2,  1.00, 0.08, 0.00
3,  1.07, 1.00, 0.06
4,  0.05, 1.00, 0.00
5,  0.00, 0.06, 1.00
6,  1.00, 0.00, 1.08
7,  1.00, 1.04, 1.00
8,  0.09, 1.00, 1.00
*Element, type=C3D8, elset=ALL
1, 1, 2, 3, 4, 5, 6, 7, 8
*Solid Section, elset=ALL, material=ELUMAT
**
*Material, name=ELUMAT
*Depvar
48,
*User Material, constants=2
210000., 0.3
**
*Nset, nset=BASE
1, 2, 3, 4
*Nset, nset=TOP
5, 6, 7, 8
**
*Step, name=Step-1, nlgeom=NO
*Static
1.0, 1.0, 1e-05, 1.0
*Boundary
BASE, ENCASTRE
*Cload
5, 1, 15.0
5, 3, 30.0
6, 1, 25.0
6, 3, 10.0
7, 1,  5.0
7, 3, 40.0
8, 1, 35.0
8, 3, 20.0
**
*Output, field
*Node Output
U, RF
*Element Output, directions=YES
S, SDV
*End Step
